Cv := [0, 0.18; 1, 1.15; 2, 1.98; 3, 2.02; 4, 1.5; 5, 1.12; 6, 0.65; 7, 0.35; 8, 0.05; 9, 0.03]
C := Cv[:, 1]/((2*sum(Cv[:, 1]) - Cv[0, 1] - Cv[9, 1])/2) = [0.0201681; 0.128852; 0.221849; 0.226331; 0.168067; 0.12549; 0.0728291; 0.0392157; 0.00560224; 0.00336134]
τ := (2*Cv[:, 0]*C - Cv[0, 0]*C[0] - Cv[9, 0]*C[9])/2 = 3.32269
Z := C
θ := Cv[:, 0]/τ
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n := 4
Ckp(t) := n^n*(t/τ)^(n - 1)*e^(-n*t/τ)/(τ*(n - 1)!)
P(t) := t/τ
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Ckpt := [
    Ckp(Cv[0, 0]);
    Ckp(Cv[1, 0]);
    Ckp(Cv[2, 0]);
    Ckp(Cv[3, 0]);
    Ckp(Cv[4, 0]);
    Ckp(Cv[5, 0]);
    Ckp(Cv[6, 0]);
    Ckp(Cv[7, 0]);
    Ckp(Cv[8, 0]);
    Ckp(Cv[9, 0])
] = [0; 0.105028; 0.252101; 0.255285; 0.181559; 0.106396; 0.0551628; 0.0262823; 0.0117711; 0.00502865]
σ := sqrt(sum((Ckpt - C)^2)/9) = 0.0205336
